*Heading
** Job name: Job-1 Model name: Model-1
** Generated by: Abaqus/CAE 2024
*Preprint, echo=NO, model=NO, history=NO, contact=NO
**
** PARTS
**
*Part, name=Part-1
*Node
      1, 0.0444499999,           0., 0.0126999998
      2, 0.0444499999,           0., 0.0253999997
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*Element, type=S4R
  1,   1,  10, 166,  61
  2,  10,  11, 167, 166
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*Nset, nset=Set-1, generate
   1,  585,    1
*Elset, elset=Set-1, generate
   1,  528,    1
*Nset, nset=CenterNode
 1,
** Section: Section-2
*Shell Section, elset=Set-1, material=FR4
0.0016, 5
*End Part
**
**
** ASSEMBLY
**
*Assembly, name=Assembly
**
*Instance, name=Part-1-1, part=Part-1
*End Instance
**
*Nset, nset=Set-1, instance=Part-1-1
   3,   4,   5,   6,   8,   9
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*Elset, elset=Set-1, instance=Part-1-1
 127, 128, 129, 130, 131, 132
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*Nset, nset=Set-2, instance=Part-1-1
 1,
*End Assembly
*Amplitude, name=Amp-1
             0.,              0.,           0.001,              0.,          0.0015,              1.,           0.002,              0.
*Amplitude, name=Amp-2
             0.,              0.,           0.001,              1.,           0.002,              0.
*Amplitude, name=Amp-3
             0.,              0.,           0.005,              0.,        0.005001,              1.,          0.0051,              1.
       0.005101,              0.
**
** MATERIALS
**
*Material, name=FR4
*Damping, alpha=65.53, beta=3.95e-06
*Density
1900.,
*Elastic
 2.1e+10, 0.136
**
** BOUNDARY CONDITIONS
**
** Name: FixedEnds Type: Symmetry/Antisymmetry/Encastre
*Boundary
Set-1, ENCASTRE
** ----------------------------------------------------------------
**
** STEP: Force
**
*Step, name=Force, nlgeom=YES
*Dynamic, Explicit
, 0.05
*Bulk Viscosity
0.06, 1.2
**
** LOADS
**
** Name: Load-1   Type: Concentrated force
*Cload, amplitude=Amp-3
Set-2, 2, -30.
**
** OUTPUT REQUESTS
**
*Restart, write, number interval=1, time marks=NO
**
** FIELD OUTPUT: CenterNodeDisp
**
*Output, field
*Node Output, nset=Part-1-1.CenterNode
U, UT, V, VT
**
** FIELD OUTPUT: F-Output-1
**
*Output, field, variable=PRESELECT
**
** HISTORY OUTPUT: CenterDisp
**
*Output, history
*Node Output, nset=Part-1-1.CenterNode
U1, U2, U3, UR1, UR2, UR3
**
** HISTORY OUTPUT: H-Output-1
**
*Output, history, variable=PRESELECT
*End Step
