*Heading
** Job name: Job-2 Model name: Model-1
** Generated by: Abaqus/CAE 2024
*Preprint, echo=NO, model=NO, history=NO, contact=NO
**
** PARTS
**
*Part, name=Part-1
*Node
      1, 0.0444499999,           0., 0.0126999998
      2, 0.0444499999,           0., 0.0253999997
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*Element, type=S4R
  1,   1,  10, 166,  61
  2,  10,  11, 167, 166
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*Nset, nset=Set-1, generate
   1,  585,    1
*Elset, elset=Set-1, generate
   1,  528,    1
*Nset, nset=CenterNode
 1,
** Section: Section-2
*Shell Section, elset=Set-1, material=FR4
0.0016, 5
*End Part
**
**
** ASSEMBLY
**
*Assembly, name=Assembly
**
*Instance, name=Part-1-1, part=Part-1
*End Instance
**
*Nset, nset=Set-1, instance=Part-1-1
   3,   4,   5,   6,   8,   9
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*Elset, elset=Set-1, instance=Part-1-1
 127, 128, 129, 130, 131, 132
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*Nset, nset=Set-2, instance=Part-1-1
 1,
*End Assembly
*Amplitude, name=Amp-1
             0.,              0.,           0.001,              0.,          0.0015,              1.,           0.002,              0.
*Amplitude, name=Amp-2
             0.,              0.,           0.001,              1.,           0.002,              0.
*Amplitude, name=Amp-3
             0.,              0.,           1e-05,              1.,           2e-05,              0.
**
** MATERIALS
**
*Material, name=FR4
*Damping, alpha=65.53, beta=3.95e-06
*Density
1900.,
*Elastic
 1.86e+10,0.
**
** BOUNDARY CONDITIONS
**
** Name: FixedEnds Type: Symmetry/Antisymmetry/Encastre
*Boundary
Set-1, ENCASTRE
** ----------------------------------------------------------------
**
** STEP: Step-1
**
*Step, name=Step-1, nlgeom=NO, perturbation
*Frequency, eigensolver=Lanczos, sim, acoustic coupling=on, normalization=mass
, , 100000., , ,
**
** OUTPUT REQUESTS
**
*Restart, write, frequency=0
**
** FIELD OUTPUT: F-Output-1
**
*Output, field
*Node Output
U,
**
** HISTORY OUTPUT: H-Output-1
**
*Output, history
*Energy Output
ALLKE, ALLSE
*End Step
** Exporting Global Mass and Stiffness Matrices
*STEP, NAME=Global_Matrices
*MATRIX GENERATE, STIFFNESS, MASS
*MATRIX OUTPUT, STIFFNESS, MASS, FORMAT=MATRIX INPUT
*END STEP
